# Numerical analysis Task 7 var. 1 Valery Krivenkin (g. 8894)
x := [-1; 0; 1; 2; 3]
y := [3; 1; 4; 5; 0]
h := 1
delta_x := 0.1
finite_diffs(y, table, current_col, n) :=
    for i ∈ 0 .. n
        table[:, current_col][i] ← y[i + 1] - y[i]
    return table if current_col == cols(table) - 1
    finite_diffs(table[:, current_col], table, current_col + 1, n - 1) otherwise
size := rows(y) - 1 = 4
placeholder(i, j) :=
    return 10^10
table := matrix(size, size, placeholder)
diffs := finite_diffs(y, table, 0, size - 1)
# Get only the first row
diffs = [
    -2, 5, -7, 3;
    3, -2, -4, 10000000000;
    1, -6, 10000000000, 10000000000;
    -5, 10000000000, 10000000000, 10000000000
]
y0 := transpose(diffs)[:, 0] = [-2; 5; -7; 3]
# ! Note that h = 1 so q = (X - x_0)
f(X) := y[0] + (X - x[0])*y0[0] + ((X - x[0])^2 - (X - x[0]))/2*y0[1] + ((X - x[0])^3 - 3*(X - x[0])^2 + 2*(X - x[0]))/6*y0[2] + ((X - x[0])^4 - 6*(X - x[0])^3 + 11*(X - x[0])^2 - 6*(X - x[0]))/24*y0[3]
# Assert f(x) is good approximation function
x = [-1; 0; 1; 2; 3]
y = [3; 1; 4; 5; 0]
result := [f(-1); f(0); f(1); f(2); f(3)] = [3; 1; 4; 5; 0]
# First derivative
f1(X) := y0[0] + (2*(X - x[0]) - 1)/2*y0[1] + (3*(X - x[0])^2 - 6*(X - x[0]) + 2)/6*y0[2] + (2*(X - x[0])^3 - 9*(X - x[0])^2 + 11*(X - x[0]) - 3)/12*y0[3]
# Second derivative
f2(X) := y0[1] + (X - x[0] - 1)*y0[2] + (6*(X - x[0])^2 - 18*(X - x[0]) + 11)/12*y0[3]
# Calculate the result
point := x[0] + delta_x = -0.9
f1(point) = -6.16533
f2(point) = 13.615
