# Numerical analysis Task 4 var. 1 Valery Krivenkin (g. 8894)
a := 0
b := 1
h := 0.1
f(x) := x*cos(x) - 1
n := (b - a)/h = 10
i := 0 .. n
x[i] := a + i*h
y[i] := f(a + i*h)
x = [0; 0.1; 0.2; 0.3; 0.4; 0.5; 0.6; 0.7; 0.8; 0.9; 1]
y = [-1; -0.9005; -0.803987; -0.713399; -0.631576; -0.561209; -0.504799; -0.46461; -0.442635; -0.440551; -0.459698]
finite_diffs(y, table, current_col, n) :=
    for i ∈ 0 .. n
        table[:, current_col][i] ← y[i + 1] - y[i]
    return table if current_col == cols(table) - 1
    finite_diffs(table[:, current_col], table, current_col + 1, n - 1) otherwise
size := rows(y) - 1 = 10
placeholder(i, j) :=
    return 10^10
table := matrix(size, size, placeholder)
result := finite_diffs(y, table, 0, size - 1)
result = [
    0.0995004, -0.00298752, -0.00293775, 0, 0, 0, 0, 0, 0, 0;
    0.0965129, -0.00592527, -0.00283891, 0.000146525, 0, 0, 0, 0, 0, 10000000000;
    0.0905876, -0.00876418, -0.00269239, 0.000192159, 0, 0, 0, 0, 10000000000, 10000000000;
    0.0818235, -0.0114566, -0.00250023, 0.000235097, 0, 0, 0, 10000000000, 10000000000, 10000000000;
    0.0703669, -0.0139568, -0.00226513, 0.000274731, 0, 0, 10000000000, 10000000000, 10000000000, 10000000000;
    0.0564101, -0.0162219, -0.0019904, 0.000310493, 0, 10000000000, 10000000000, 10000000000, 10000000000, 10000000000;
    0.0401882, -0.0182123, -0.00167991, 0.00034187, 10000000000, 10000000000, 10000000000, 10000000000, 10000000000, 10000000000;
    0.0219758, -0.0198922, -0.00133804, 10000000000, 10000000000, 10000000000, 10000000000, 10000000000, 10000000000, 10000000000;
    0.0020836, -0.0212303, 10000000000, 10000000000, 10000000000, 10000000000, 10000000000, 10000000000, 10000000000, 10000000000;
    -0.0191467, 10000000000, 10000000000, 10000000000, 10000000000, 10000000000, 10000000000, 10000000000, 10000000000, 10000000000
]
