# Numerical analysis Task 8 var. 1 Valery Krivenkin (g. 8894)
f(x) := 5*x^2*cos(x) - sin(6*x)
a := 0
b := 4*π
n := 50
# 1) Using built-in function
# Note that initial value of n in task is 8
I := integral(f(x), x = a .. b) = 125.664
# 2) Riemann sum
h := (b - a)/n = 0.251327
i := a, a + h .. b
leftmost := f(a) = 0
rightmost := f(b) = 789.568
I_left := h*(sum(f(i), i) - rightmost) = 27.1072
I_right := h*(sum(f(i), i) - leftmost) = 225.547
i
# 3) Trapezoidal rule
I_trapezoidal := h*(sum(f(i), i) - (leftmost + rightmost)/2) = 126.327
# 4) Simpson's rule
g(i, j) := 0
build_vector(f, a, b, n) :=
    size ← 2*n + 1
    h ← (b - a)/(2*n)
    vector ← matrix(size, 1, g)
    x ← a
    for i ∈ 0 .. size - 1
        vector[i] ← f(x)
        x ← x + h
    return vector
sum_of_odds(vector) :=
    result ← 0
    for i ∈ 1, 3 .. rows(vector) - 1
        result ← result + vector[i]
    return result
sum_of_evens(vector) :=
    result ← 0
    for i ∈ 2, 4 .. rows(vector) - 2
        result ← result + vector[i]
    return result
vector := build_vector(f, a, b, n)
odds := sum_of_odds(vector) = 498.677
evens := sum_of_evens(vector) = 107.856
I_Simpson := (b - a)/(6*n)*(leftmost + 2*evens + 4*odds + rightmost) = 125.663
