# Numerical analysis Task 3 var. 1 Valery Krivenkin (g. 8894)
x := [-2; -1; 0; 1; 2]
y := [3; 1; -4; 2; 0]
f(i, j) :=
    return 1
build_system(x) :=
    system[:, 0] ← matrix(rows(x), 1, f)
    for n ∈ 1 .. rows(x) - 1
        system[:, n] ← x^n
    return system
system := build_system(x) = [1, -2, 4, -8, 16; 1, -1, 1, -1, 1; 1, 0, 0, 0, 0; 1, 1, 1, 1, 1; 1, 2, 4, 8, 16]
det := |system| = 288
substitute(system, y, j) :=
    system[:, j] ← y
    return system
get_coeffs(system, y) :=
    det ← |system|
    a ← matrix(rows(system), 1, f)
    for j ∈ 0 .. cols(system) - 1
        a[j] ← |substitute(system, y, j)|/det
    return a
coeffs := get_coeffs(system, y) = [-4; 0.916667; 6.875; -0.416667; -1.375]
L(x) := coeffs[0] + coeffs[1]*x + coeffs[2]*x^2 + coeffs[3]*x^3 + coeffs[4]*x^4
x = [-2; -1; 0; 1; 2]
y = [3; 1; -4; 2; 0]
L(x) = [3; 1; -4; 2; 0]
