# Numerical analysis Task 2 var. 1 Valery Krivenkin (g. 8894)
# 1. Find approximate inverse of a matrix
A := [0.51, -1.09, 2.24; -1.11, 0.75, -3.28; 2.01, 1.06, -1.99]
det := |A| = 4.59346
ndigits := 3
inverse := A^-1 = [0.431984, 0.044694, 0.412586; -1.91614, -1.20112, -0.177121; -0.584331, -0.59465, -0.180126]
i := 0 .. rows(A) - 1
j := 0 .. cols(A) - 1
D_0[i, j] := round(inverse[i, j], ndigits)
D_0 = [0.432, 0.045, 0.413; -1.916, -1.201, -0.177; -0.584, -0.595, -0.18]
E := identity(rows(A)) = [1, 0, 0; 0, 1, 0; 0, 0, 1]
F_0 := E - A*D_0 = [-0.0006, 0.00076, -0.00036; 0.001, -0.0009, 0.00078; 0.00048, -0.00144, -0.00071]
f_min := min(F_0) = -0.00144
f_max := max(F_0) = 0.001
largest := max(|f_min|, |f_max|) = 0.00144
q := 0.03
assert_q_is_good(F, q) :=
    is_good ← 1
    if q < 0 or q ≥ 1
        is_good ← 0
        return is_good
    for i ∈ 0 .. rows(F) - 1
        for j ∈ 0 .. cols(F) - 1
            if |F[i, j]| > q/rows(F)
                is_good ← 0
                return is_good
    return is_good
assert_q_is_good(F_0, q) = 1
# 2. Correct the result using iterative method
eps := 10^-5
correct_inverse(A, D, F, q, eps) :=
    E ← identity(rows(A))
    k ← 0
    D_k ← D
    while 1
        F_k ← E - A*D_k
        D_prev ← D_k
        k ← k + 1
        D_k ← D_prev*(E + F_k)
        return D_k if normi(D_k - D_prev) ≤ eps
corrected_result := correct_inverse(A, D_0, F_0, q, eps) = [0.431984, 0.044694, 0.412586; -1.91614, -1.20112, -0.177121; -0.584331, -0.59465, -0.180126]
result - A^-1 =  # error: This variable is undefined.
