# Numerical analysis Task 1 var. 1 Valery Krivenkin (g. 8894)
A := [4, -1, 2, 0; -4, 8, 2, 1; 1, 1, 5, 1; -8, 0, 1, 10]
b := [1; -1; 5; 10]
eps := 0.001
# 1. Iterative method
i := 0 .. rows(A) - 1
j := 0 .. cols(A) - 1
L[i, j] := -A[i, j]/A[i, i]
beta[i] := b[i]/A[i, i]
L[i, i] := 0
L = [0, 0.25, -0.5, 0; 0.5, 0, -0.25, -0.125; -0.2, -0.2, 0, -0.2; 0.8, 0, -0.1, 0]
beta = [0.25; -0.125; 1; 1]
normi(L) = 0.9
iterative_method(L, beta, eps) :=
    k ← 0
    x[:, k] ← beta
    while 1
        return x if normi(L)^(k + 1)/(1 - normi(L))*|max(beta)| < eps
        x[:, k + 1] ← L*x[:, k] + beta
        k ← k + 1
im_results := iterative_method(L, beta, eps)
im_n_iterations := cols(im_results) - 1 = 87
exact_solution := lsolve(A, b) = [-0.506849; -0.726027; 1.15068; 0.479452]
im_approx_solution := im_results[:, im_n_iterations] = [-0.506849; -0.726027; 1.15068; 0.479452]
i := 0 .. length(exact_solution) - 1
im_diff[i] := |exact_solution[i] - im_approx_solution[i]|
im_diff = [7.77156e-16; 6.66134e-16; 6.66134e-16; 1.11022e-15]
# 2. Seidel method
seidel_method(L, beta, eps) :=
    k ← 0
    x[:, k] ← beta
    while 1
        x[:, k + 1] ← x[:, k]
        for i ∈ 0 .. rows(L) - 1
            acc ← 0
            for j ∈ 0 .. cols(L) - 1
                acc ← acc + L[i, j]*x[:, k + 1][j]
            x[:, k + 1][i] ← acc + beta[i]
        return x if normi(L)^k/(1 - normi(L))*|max(x[:, 1] - x[:, 0])| < eps
        k ← k + 1
sm_results := seidel_method(L, beta, eps)
sm_n_iterations := cols(sm_results) - 1 = 49
exact_solution = [-0.506849; -0.726027; 1.15068; 0.479452]
sm_approx_solution := sm_results[:, sm_n_iterations] = [-0.506849; -0.726027; 1.15068; 0.479452]
i := 0 .. length(exact_solution) - 1
sm_diff[i] := |exact_solution[i] - sm_approx_solution[i]|
sm_diff = [3.33067e-16; 1.11022e-16; 2.22045e-16; 3.33067e-16]
# Results of Iterative and Seidel methods
im_results = [
    0.25, -0.28125, -0.23125, -0.354844, -0.401969, -0.431019, -0.45929, -0.472893, -0.484427, -0.4916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;
    -0.125, -0.375, -0.596875, -0.555625, -0.649438, -0.662003, -0.684241, -0.698865, -0.706577, -0.713409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;
    1, 0.775, 0.91125, 1.02612, 1.03732, 1.08758, 1.10367, 1.11942, 1.12991, 1.13625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;
    1, 1.1, 0.6975, 0.723875, 0.613512, 0.574693, 0.546427, 0.522201, 0.509743, 0.499468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]
sm_results = [
    0.25, -0.28125, -0.402344, -0.452471, -0.480286, -0.49375, -0.500374, -0.503654, -0.505272, -0.50607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;
    -0.125, -0.640625, -0.656836, -0.691675, -0.709645, -0.717857, -0.721995, -0.724038, -0.725045, -0.725542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;
    1, 0.984375, 1.07652, 1.11473, 1.13268, 1.14182, 1.14631, 1.14852, 1.14962, 1.15016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;
    1, 0.676562, 0.570473, 0.52655, 0.502503, 0.490818, 0.485069, 0.482225, 0.480821, 0.480128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]
