# Numerical analysis Task 6 var. 1 Valery Krivenkin (g. 8894)
x := [-2; -1; 0; 1; 2]
y := [3; 1; -4; 2; 0]
h := 1
finite_diffs(y, table, current_col, n) :=
    for i ∈ 0 .. n
        table[:, current_col][i] ← y[i + 1] - y[i]
    return table if current_col == cols(table) - 1
    finite_diffs(table[:, current_col], table, current_col + 1, n - 1) otherwise
size := rows(y) - 1 = 4
placeholder(i, j) :=
    return 10^10
table := matrix(size, size, placeholder)  # Get only the sub diag values. Last value (-33) won't be used.
diffs := finite_diffs(y, table, 0, size - 1)
y0 := [diffs[3, 0]; diffs[2, 1]; diffs[1, 2]; diffs[0, 3]] = [-2; -8; -19; -33]
diffs = [
    -2, -3, 14, -33;
    -5, 11, -19, 10000000000;
    6, -8, 10000000000, 10000000000;
    -2, 10000000000, 10000000000, 10000000000
]
P(X) := y[4] + y0[0]/(1!*h)*(X - x[4]) + y0[1]/(2!*h^2)*(X - x[4])*(X - x[3]) + y0[2]/(3!*h^3)*(X - x[4])*(X - x[3])*(X - x[2])
# Simplify using mathcad built-in tool
P(X) simplify → -(X - 2)*(19*X^2 + 5*X - 12)/6
# Simplify manually
P_man(x) := -24/6 + 22/6*x + 33/6*x^2 - 19/6*x^3
# Assert the results are correct
x = [-2; -1; 0; 1; 2]
y = [3; 1; -4; 2; 0]
result := [P(0); P(1); P(2)] = [-4; 2; 0]
man_result := [P_man(0); P_man(1); P_man(2)] = [-4; 2; 0]
