# Numerical analysis Task 5 var. 1 Valery Krivenkin (g. 8894)
x := [-2; -1; 0; 1; 2]
y := [3; 1; -4; 2; 0]
h := 1
finite_diffs(y, table, current_col, n) :=
    for i ∈ 0 .. n
        table[:, current_col][i] ← y[i + 1] - y[i]
    return table if current_col == cols(table) - 1
    finite_diffs(table[:, current_col], table, current_col + 1, n - 1) otherwise
size := rows(y) - 1 = 4
placeholder(i, j) :=
    return 10^10
table := matrix(size, size, placeholder)
diffs := finite_diffs(y, table, 0, size - 1)
# Get only the first row
diffs = [
    -2, -3, 14, -33;
    -5, 11, -19, 10000000000;
    6, -8, 10000000000, 10000000000;
    -2, 10000000000, 10000000000, 10000000000
]
y0 := transpose(diffs)[:, 0] = [-2; -3; 14; -33]
P(X) := y[0] + y0[0]/(1!*h)*(X - x[0]) + y0[1]/(2!*h^2)*(X - x[0])*(X - x[1]) + y0[2]/(3!*h^3)*(X - x[0])*(X - x[1])*(X - x[2]) + y0[3]/(4!*h^4)*(X - x[0])*(X - x[1])*(X - x[2])*(X - x[3])
# Simplify using mathcad built-in tool
P(X) simplify → (X - 2)*(13*X - 76*X^2 - 33*X^3 + 48)/24
# Simplify manually
P_man(x) := -96/24 + 22/24*x + 165/24*x^2 - 10/24*x^3 - 33/24*x^4
# Assert the results are correct
x = [-2; -1; 0; 1; 2]
y = [3; 1; -4; 2; 0]
result := [P(-2); P(-1); P(0); P(1); P(2)] = [3; 1; -4; 2; 0]
P_man(x) = [3; 1; -4; 2; 0]
